#define Total Number of Houses per Phase=3
#define Weather File=CA-San_Jose_Intl_Ap.tmy3
#define Start Time=2020-01-01 00:00:00 PST
#define Stop Time=2021-01-01 00:00:00 PST
#define Run Name=Electrification Fraction
#define Baseline=0.5
#define Run 1=0.6
#define Run 2=0.7
#define Run 3=0.8
#define Run 4=0.9
#define Full Electric=1
#define Floor area= 1500 sf
#define Thermal Integrity= GOOD
#define Solar capacity=
#define Battery Capacity=
