class pgande_residential_tou {
	parent tariff;

	//Inputs
	string name;

	// remove slashes maybe for syntax
	double energyratestructure/period0/tier0rate [$/kWh];
	double energyratestructure/period0/tier0max [kWh];
	double energyratestructure/period0/tier1rate [$/kWh];
	double energyratestructure/period0/tier1max [kWh];
	double energyratestructure/period0/tier2rate [$/kWh];
	double energyratestructure/period0/tier2max [kWh];
	double energyratestructure/period0/tier3rate [$/kWh];
	double energyratestructure/period0/tier3max [kWh];
	double energyratestructure/period0/tier4rate [$/kWh];

	double energyratestructure/period1/tier0rate [$/kWh];
	double energyratestructure/period1/tier0max [kWh];
	double energyratestructure/period1/tier1rate [$/kWh];
	double energyratestructure/period1/tier1max [kWh];
	double energyratestructure/period1/tier2rate [$/kWh];
	double energyratestructure/period1/tier2max [kWh];
	double energyratestructure/period1/tier3rate [$/kWh];
	double energyratestructure/period1/tier3max [kWh];
	double energyratestructure/period1/tier4rate [$/kWh];

	double energyratestructure/period2/tier0rate [$/kWh];
	double energyratestructure/period2/tier0max [kWh];
	double energyratestructure/period2/tier1rate [$/kWh];
	double energyratestructure/period2/tier1max [kWh];
	double energyratestructure/period2/tier2rate [$/kWh];
	double energyratestructure/period2/tier2max [kWh];
	double energyratestructure/period2/tier3rate [$/kWh];
	double energyratestructure/period2/tier3max [kWh];
	double energyratestructure/period2/tier4rate [$/kWh];

	double energyratestructure/period3/tier0rate [$/kWh];
	double energyratestructure/period3/tier0max [kWh];
	double energyratestructure/period3/tier1rate [$/kWh];
	double energyratestructure/period3/tier1max [kWh];
	double energyratestructure/period3/tier2rate [$/kWh];
	double energyratestructure/period3/tier2max [kWh];
	double energyratestructure/period3/tier3rate [$/kWh];
	double energyratestructure/period3/tier3max [kWh];
	double energyratestructure/period3/tier4rate [$/kWh];

	double energyratestructure/period4/tier0rate [$/kWh];
	double energyratestructure/period4/tier0max [kWh];
	double energyratestructure/period4/tier1rate [$/kWh];

	double energyratestructure/period5/tier0rate[$/kWh];
	double energyratestructure/period6/tier0rate [$/kWh];
	double energyratestructure/period7/tier0rate [$/kWh];

	int energyweekdayschedule;
	int energyweekendschedule;

	string dgrules;

	double fixedchargefirstmeter [$/month];
	double mincharge [$/month];
	}
