#define Header=Value
#define WEATHER_STATION=CA-San_Francisco_Intl_Ap
#define STARTTIME=2020-01-01 00:00:00 PST
#define STOPTIME=2020-01-01 12:00:00 PST
#define TIMEZONE=PST+8PDT
#define MODEL=model.glm
#define OUTPUT=output.csv
#define TARIFF_UTILITY=Pacific Gas & Electric Co
#define TARIFF_SECTOR=Residential
#define TARIFF_NAME=E-TOU-C3
#define TARIFF_TYPE=TOU
#define TARIFF_REGION=Region R
#define TARIFF_INCLINING_BLOCK_RATE=True
#define TARIFF_INDEX=0
