// GridLAB-D tariff design model file

//GridLAB-D modules
module revenue;

//py modules
module tariff_design;

//Define classes here (inputs and outputs)

class pgande_residential_tou {
	parent tariff;

	//Inputs
	string name;

	double energyratestructure/period0/tier0rate [$/kWh];
	double energyratestructure/period0/tier0max [kWh];
	double energyratestructure/period0/tier1rate [$/kWh];
	double energyratestructure/period0/tier1max [kWh];
	double energyratestructure/period0/tier2rate [$/kWh];
	double energyratestructure/period0/tier2max [kWh];
	double energyratestructure/period0/tier3rate [$/kWh];
	double energyratestructure/period0/tier3max [kWh];
	double energyratestructure/period0/tier4rate [$/kWh];

	double energyratestructure/period1/tier0rate [$/kWh];
	double energyratestructure/period1/tier0max [kWh];
	double energyratestructure/period1/tier1rate [$/kWh];
	double energyratestructure/period1/tier1max [kWh];
	double energyratestructure/period1/tier2rate [$/kWh];
	double energyratestructure/period1/tier2max [kWh];
	double energyratestructure/period1/tier3rate [$/kWh];
	double energyratestructure/period1/tier3max [kWh];
	double energyratestructure/period1/tier4rate [$/kWh];

	double energyratestructure/period2/tier0rate [$/kWh];
	double energyratestructure/period2/tier0max [kWh];
	double energyratestructure/period2/tier1rate [$/kWh];
	double energyratestructure/period2/tier1max [kWh];
	double energyratestructure/period2/tier2rate [$/kWh];
	double energyratestructure/period2/tier2max [kWh];
	double energyratestructure/period2/tier3rate [$/kWh];
	double energyratestructure/period2/tier3max [kWh];
	double energyratestructure/period2/tier4rate [$/kWh];

	double energyratestructure/period3/tier0rate [$/kWh];
	double energyratestructure/period3/tier0max [kWh];
	double energyratestructure/period3/tier1rate [$/kWh];
	double energyratestructure/period3/tier1max [kWh];
	double energyratestructure/period3/tier2rate [$/kWh];
	double energyratestructure/period3/tier2max [kWh];
	double energyratestructure/period3/tier3rate [$/kWh];
	double energyratestructure/period3/tier3max [kWh];
	double energyratestructure/period3/tier4rate [$/kWh];

	double energyratestructure/period4/tier0rate [$/kWh];
	double energyratestructure/period4/tier0max [kWh];
	double energyratestructure/period4/tier1rate [$/kWh];

	double energyratestructure/period5/tier0rate[$/kWh];
	double energyratestructure/period6/tier0rate [$/kWh];
	double energyratestructure/period7/tier0rate [$/kWh];

	int energyweekdayschedule;
	int energyweekendschedule;

	string dgrules;

	double fixedchargefirstmeter [$/month];
	double mincharge [$/month];
	}

class tariff_bill {
	parent billing;

	//Inputs
	string energy_tariff;
	string generation_tariff;
	string meter;
	double baseline_demand [kWh/day];
	string INCLINING_BLOCK_RATE;

	//Outputs
	double total_bill [$];
	double dg_charges [$];
	double energy_charges [$];
	double net_revenue [$];

	double peak_load [kW];
	double avg_load [kW/day];
	double peak_generation [kW];
	double avg_generation [kW/day];

}
